# Practica1_CEAST_ModeladoEstatico_IM-FOC.xmcd: Modelado del motor de induccion trifásico con control FOC, asignatura CEAST. Se supone estátor conectado en estrella. Se hallan las 3 zonas de funcionamiento del típicas del control FOC (ver libro SUL).
# El Tem se representa en función de 3 variables:
# - Vs = Tensión eficaz aplicada al estátor = tensión fase-neutro de la alimentación AC en la conexión estrella del estátor
# - fe = frecuencia eléctrica aplicada al estátor (excitación)
# - Otra variable que representa la velocidad de giro en el punto de OP. 3 posibilidades: Nr (rpm), wr=2*pi*fr ó S=(we-wr)/we=wslip/we=1-(wr/we)
# NOTAS:
# 1.- Las velocidades angulares (wr, wsinc, wslip) se dan todas en rad/s eléctricos, salvo que se diga lo contrario (con letra Ω o sufijo 'mec').
# 2.- Las velocidades mecánicas se expresan  preferentemente en r.p.m. (Nr, Nsinc)
# 3.- Con una batería de Vdc=400V se puede llegar con PWM-seno a Vff_rms=245V (fundamental), y con SVM-PWM a Vff_rms=283V (fund.). Ambos valores sin sobremodulación
# 1) Obtención de las curvas PAR-VELOCIDAD del rotor en función de la frecuencia eléctrica aplicada al estator (fe=fsinc)
fe_nom := 60  # Frecuencia eléctrica síncrona nominal del motor (Hz) (según datos de la placa)
Vff_nom := 220  # Tensión nominal eficaz entre fases (con la batería de Vdc=400V podemos llegar hasta 245V (PWM-seno) o hasta 283 (PWM-SVM), sin sobremodular
PP := 2
# Número de PARES de polos
Vs_nom := Vff_nom/sqrt(3)  # Tensión nominal eficaz de estátor. Con el estátor conectado en estrella se trata de la tensión fase-neutro.
Vs_nom = 127.017
# El punto de operación está determinado por fe y Nr, que a su vez determinan el Deslizamiento S
Pmec_nom := 22*10^3  # Potencia mecánica del motor (W) para el punto de operación nominal
Nr_nom := 1775  # Velocidad mecánica del rotor del motor (r.p.m.) para el punto de operación nominal.
Tem_nom := Pmec_nom/(Nr_nom*2*π/60)  # Par electromagnético del motor (N*m) para el punto de operación nominal
Tem_nom = 118.357
Ne(fe) := 60/PP*fe  # Velocidad síncrona del motor (r.p.m.)
Ne(fe_nom) = 1800
S(fe, Nr) := (Ne(fe) - Nr)/Ne(fe)  # Deslizamiento para el punto de operación deseado
S(fe_nom, Nr_nom) = 0.0138889
# VALORES de las Impedancias del circuito equivalente de la máquina visto desde el estátor.
# Por motivos constructivos se suelen cumplir los siguientes CRITERIOS:
# A) Xm+Xls >> Rs
# B) Xm >> Xls
Rs := 44*10^-3  # Resistencia del estator
Lm := 12.9*10^-3  # Inductancia magnetizante (vista desde el estator)
Xm(fe, Lm) := 2*π*fe*Lm  # Reactancia magnetizante (vista desde el estator): Xm=2*pi*fe*Lm.
Lls := 550*10^-6  # Inductancia del estator
Xm(fe_nom, Lm) = 4.86319
Xls(fe, Lls) := 2*π*fe*Lls  # Reactancia del estator: Xls=2*pi*fe*Lfs
Xls(fe_nom, Lls) = 0.207345
Rr := 25.2*10^-3  # Resistencia del rotor (vista desde el estator).
Llr := 470*10^-6  # Inductancia del rotor
Xlr(fe, Llr) := 2*π*fe*Llr  # Reactancia del rotor (vista desde el estator): Xlr=2*pi*fe*Lfr.
Xlr(fe_nom, Llr) = 0.177186
# Cálculo del coseno de Phi (factor de potencia) de la máquina en función de las impedancias de estátor y rotor,
# y del punto de operación
Zreal == Rs + Rr/S(fe, Nr)*Xm^2/((Rr/Slip(fe, Nr))^2 + (Xm + Xlr)^2)  # Parte real de la impedancia vista desde el estátor
Zimag == Xls + Xm*((Rr/S(fe, Nr))^2 + (Xm + Xlr)*Xlr)/((Rr/S(fe, Nr))^2 + (Xm + Xlr)^2)  # Parte imaginaria de la impedancia vista desde el estátor
Zreal(fe, Nr, Rs, Lls, Lm, Rr, Llr) := Rs + Rr/S(fe, Nr)*Xm(fe, Lm)^2/((Rr/S(fe, Nr))^2 + (Xm(fe, Lm) + Xlr(fe, Llr))^2)
Zimag(fe, Nr, Lls, Lm, Rr, Llr) := Xls(fe, Lls) + Xm(fe, Lm)*((Rr/S(fe, Nr))^2 + (Xm(fe, Lm) + Xlr(fe, Llr))*Xlr(fe, Llr))/((Rr/S(fe, Nr))^2 + (Xm(fe, Lm) + Xlr(fe, Llr))^2)
Cos_Phi(fe, Nr, Rs, Lls, Lm, Rr, Llr) := Zreal(fe, Nr, Rs, Lls, Lm, Rr, Llr)/sqrt(Zreal(fe, Nr, Rs, Lls, Lm, Rr, Llr)^2 + Zimag(fe, Nr, Lls, Lm, Rr, Llr)^2)
Cos_Phi(fe_nom, Nr_nom, Rs, Lls, Lm, Rr, Llr) = 0.859215  # Los valores habituales en el punto de OP nominal suelen estar entre 0.8 y 0.95
Cos_Phi(fe_nom, 0.94*Nr_nom, Rs, Lls, Lm, Rr, Llr) = 0.672495
# Corriente de estator eficaz (por fase) del motor
# SUP: estátor conectado en estrella
# Vs=Vfn_rms
Is(fe, Nr, Vs, Rs, Lls, Lm, Rr, Llr) := Vs/sqrt(Zreal(fe, Nr, Rs, Lls, Lm, Rr, Llr)^2 + Zimag(fe, Nr, Lls, Lm, Rr, Llr)^2)
Is(fe_nom, Nr_nom, Vs_nom, Rs, Lls, Lm, Rr, Llr) = 70.8985
# Observar que si la velocidad es menor que la nominal (lo que ocurre transitoriamente si la carga pide más par), la corriente de estátor aumenta mucho. Por ello es necesaria una limitación de corriente en los lazos de control del inversor que acciona el motor.
Is(fe_nom, 0.94*Nr_nom, Vs_nom, Rs, Lls, Lm, Rr, Llr) = 234.911
# Potencia eléctrica de entrada a la máquina calculada desde el estátor:
# Calculo de la potencia eléctrica a la entrada del motor (estátor) en un punto de operación. Con esto puedo comprobar si el valor de Nr_nom asignado anteriormente es correcto.
#
# Ps debe algo mayor que la Pm_nom, pues en la máquina hay pérdidas. En las ecuaciones del modelo se tienen en cuenta las pérdidas óhmicas en Rs y Rr. No se tienen en cuenta las pérdidas magnéticas.
Ps(fe, Nr, Vs, Rs, Lls, Lm, Rr, Llr) := 3*Vs*Is(fe, Nr, Vs, Rs, Lls, Lm, Rr, Llr)*Cos_Phi(fe, Nr, Rs, Lls, Lm, Rr, Llr)
Pmec_nom = 22000
Nr_nom = 1775
# Características eléctricas
# del motor vistas desde el estátor
# (entrada) en el punto de operación
Ps(fe_nom, Nr_nom, Vs_nom, Rs, Lls, Lm, Rr, Llr) = 23212.5
Cos_Phi(fe_nom, Nr_nom, Rs, Lls, Lm, Rr, Llr) = 0.859215
Is(fe_nom, Nr_nom, Vs_nom, Rs, Lls, Lm, Rr, Llr) = 70.8985
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# Circuito equivalente de THEVENIN del estator para el cálculo del par electromagnético (Tem) y la corriente de rotor Ir (vista desde el estátor)
Rth(fe, Rs, Lls, Lm) := Rs*Xm(fe, Lm)^2/(Rs^2 + (Xls(fe, Lls) + Xm(fe, Lm))^2)  # Parte real de la impedancia de Thevenin
Rth(fe_nom, Rs, Lls, Lm) = 0.040472
Rs = 0.044  # Normalmente se parecen mucho Rth y Rs
# Parte imaginaria de la impedancia de Thevenin
Xth(fe, Rs, Lls, Lm) := (Rs^2*Xm(fe, Lm) + Xls(fe, Lls)*Xm(fe, Lm)*(Xls(fe, Lls) + Xm(fe, Lm)))/(Rs^2 + (Xls(fe, Lls) + Xm(fe, Lm))^2)
Xth(fe_nom, Rs, Lls, Lm) = 0.199218
Xls(fe_nom, Lls) = 0.207345
# Normalmente se parecen mucho Xth y Xls
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Vth(fe, Vs, Rs, Lls, Lm) := Vs*Xm(fe, Lm)/sqrt(Rs^2 + (Xls(fe, Lls) + Xm(fe, Lm))^2)  # Tensión de Thevenin (valor eficaz)
Vth(fe_nom, Vs_nom, Rs, Lls, Lm) = 121.818
Vs_nom = 127.017  # Normalmente se parecen mucho Vth y Vs
# PAR ELECTROMAGNÉTICO
Tem(fe, Nr, Vs, Rs, Lls, Lm, Rr, Llr) := 3*Vth(fe, Vs, Rs, Lls, Lm)^2*S(fe, Nr)*Rr/(Rr^2 + S(fe, Nr)*2*Rth(fe, Rs, Lls, Lm)*Rr + S(fe, Nr)^2*(Rth(fe, Rs, Lls, Lm)^2 + (Xth(fe, Rs, Lls, Lm) + Xlr(fe, Llr))^2))*PP/(2*π*fe)
Tem(fe_nom, Nr_nom, Vs_nom, Rs, Lls, Lm, Rr, Llr) = 119.626  # Tem en el punto de OP nominal
S(fe_nom, Nr_nom) = 0.0138889
Tem_nom = 118.357
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# Comprobación de la potencia mecánica en el punto de OP nominal a partir del Tem en el punto OP nominal: Ωr_nom=Nr_nom*2*pi/60
Pmec_nom = 22000
Tem(fe_nom, Nr_nom, Vs_nom, Rs, Lls, Lm, Rr, Llr)*Nr_nom*2*π/60 = 22235.8
Nr_nom = 1775
# ¡Los dos valores en color naranja deben ser iguales (o con muy pequeña discrepancia)!
# POTENCIA MECÁNICA
Pmec(fe, Nr, Vs, Rs, Lls, Lm, Rr, Llr) := Tem(fe, Nr, Vs, Rs, Lls, Lm, Rr, Llr)*(1 - S(fe, Nr))*(2*π*fe)/PP
Pmec(fe_nom, Nr_nom, Vs_nom, Rs, Lls, Lm, Rr, Llr) = 22235.8
Nr_prueba := 1600, 1601 .. 1900
# CURVAS Tem frente a Nr para fe_nom y Vs_nom
Tem(fe_nom, Nr_prueba, Vs_nom, Rs, Lls, Lm, Rr, Llr)
# CURVAS Tem frente a fr para fe_nom y Vs_nom.
# fr=Nr*PP/60
fr_nom := Nr_nom*PP/60
fr_nom = 59.1667
fe_nom = 60
# CURVAS Tem frente a S para fe_nom y Vs_nom.
# S=1-(PP*Nr)/(60*fe)
Nr_prueba := 0, 1 .. 1800
Nr_nom = 1775
Tem_nom = 118.357
Snom := 1 - PP*Nr_nom/(60*fe_nom)
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Snom = 0.0138889
Nr_prueba := 0, 1 .. 2000
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Tem(fe_nom, Nr_prueba, Vs_nom, Rs, Lls, Lm, Rr, Llr)
# Efecto de la variación de fe, para Vs=Vs_nom
Tem_nom = 118.357
Nr_prueba := 0, 1 .. 3000
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# Efecto de la variación de Vs: Lógicamente al aumentar Vs conseguimos más par. Se mantiene fe=fe_nom=cte
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Nr_prueba := 500, 501 .. 2000
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# Si la carga pide un par constante, la regulación de velocidad en un rango amplio variando únicamente Vs es difícil, incluso puede poner la máquina en la zona inestable de la curva Tem-Nr
Tem(fe_nom, Nr_prueba, Vs_nom, Rs, Lls, Lm, Rr, Llr)
# Control Vs/fe=constante. Se consigue mantener el flujo magnetizante λm = constante.
Nr_prueba := 500, 501 .. 2500
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Nr_prueba := 500, 501 .. 2000
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# Con control Vs/fe=cte se consiguen una regulación de velocidad muy amplia con pequeñas variaciones de fe y Vs.
# Para un par constante el valor de S en el punto de OP apenas varía al variar de curva (de velocidad)
# Con control de fe sólamente, se consigue una regulación de velocidad muy amplia con pequeñas variaciones de fe.
# Sin embargo, para un par constante el valor de S en el punto de OP varía mucho. Al aumentar fe, aumenta S
# Probablemente esto afectará mucho al factor de potencia.
# FLUX WEAKENING CONTROL:
# ZONA 1) Se realiza control Vs/fe=constante hasta cierta fe (flujo=λm=cte), para no sobrepasar una cierta Vs_max. S=cte si el par de carga es cte. El par máximo de la máquina no varía al aummentar la velocidad (Te_max=cte al aumentar fe). Se mantiene Is=Ilim=cte.
# ZONA 2) Se aumenta fe manteniendo Vs=Vs_max=cte (el flujo y el par decrecen de manera inversamente proporcional a fe). S aumenta proporcionalmente a fe si el par de carga es cte. El par máximo de la máquina disminuye inversamente proporcional a fe (Te_max=K*(1/fe)). Se mantiene Is=Ilim=cte
# ZONA 3) Sigue aumentando fe hasta que el punto OP alcanza el par máximo (zona inestable). A partir de ese momento se sigue aumentando fe, pero con S=cte. La corriente Is disminuye con fe (Is=cte/fe) y Te_max=K*(1/fe^2).
Nr_prueba := 500, 501 .. 3000
Tem(fe_nom, Nr_prueba, Vs_nom, Rs, Lls, Lm, Rr, Llr)
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# Evolución del factor de potencia
Nr_prueba := 0, 1 .. 2000
Cos_Phi(fe, Nr, Rs, Lls, Lm, Rr, Llr)
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Cos_Phi(fe, Nr, Rs, Lls, Lm, Rr, Llr)
Tem(fe_nom, Nr_prueba, Vs_nom, Rs, Lls, Lm, Rr, Llr)
FPs_nom := Cos_Phi(fe_nom, Nr_nom, Rs, Lls, Lm, Rr, Llr)
Is(fe_nom, Nr_nom, Vs_nom, Rs, Lls, Lm, Rr, Llr) = 70.8985
FPs_nom = 0.859215
Is(fe, Nr, Vs, Rs, Lls, Lm, Rr, Llr)
Is_nom := Is(fe_nom, Nr_nom, Vs_nom, Rs, Lls, Lm, Rr, Llr)
# Par EM y Factor de potencia
Nr_prueba := 0, 1 .. 1800
# Par EM y Potencia mecánica
# Par EM y corriente de estátor
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# OBSERVACION: En otro punto de OP en el que se trabaja con menor Nr (mayor S) (sin variar fe ni Vs) se consigue más par a costa de reducir el FP.
# Esto ocurre cuando la carga pide más par y el control no varía fe ni Vs.
# Observar que si se reduce Nr pq. la carga pide más par (sin cambiar fe ni Vs), la Is aumenta drásticamente. Los controles de corriente deben limitar Is.
# FLUX WEAKENING CONTROL: CÁLCULO DE LAS FRECUENCIAS QUE DELIMITAN LAS 3 ZONAS (libro: SUL)
# ZONA 1) we<=wb. Se realiza control Vs/fe=constante hasta cierta fe (flujo=λm=cte), para no sobrepasar una cierta Vs_max. S=cte si el par de carga es cte. El par máximo de la máquina no varía al aummentar la velocidad (Te_max=cte al aumentar fe). Se mantiene Is=Ilim=cte.
# ZONA 2) wb<we<=w1. Se aumenta fe manteniendo Vs=Vs_max=cte (el flujo y el par decrecen de manera inversamente proporcional a fe). S aumenta proporcionalmente a fe si el par de carga es cte. El par máximo de la máquina disminuye inversamente proporcional a fe (Te_max=K*(1/fe)). Se mantiene Is=Ilim=cte
# ZONA 3) we>w1. Sigue aumentando fe hasta que el punto OP alcanza el par máximo (zona inestable). A partir de ese momento se sigue aumentando fe, pero con S=cte. La corriente Is disminuye con fe (Is=cte/fe) y Te_max=K*(1/fe^2).
# Valores eficaces de Vs e Is en el punto OP (valores nominales del motor):
Is(fe_nom, Nr_nom, Vs_nom, Rs, Lls, Lm, Rr, Llr) = 70.8985
Vs_nom = 127.017
Ls := Lls + Lm
Lr := Llr + Lm
Is_nom := Is(fe_nom, Nr_nom, Vs_nom, Rs, Lls, Lm, Rr, Llr)
σ := 1 - Lm^2/(Ls*Lr)  # Factor de fugas (Leakage Factor)
Is_nom = 70.8985
σ = 0.074608
# Elijo unos valores límite de la corriente eficaz de estátor en las zonas 1 y 2 y de la tensión eficaz de estátor (fase-neutro)
Is_lim0 := 1.5*Is(fe_nom, Nr_nom, Vs_nom, Rs, Lls, Lm, Rr, Llr)
Vs_lim := 1.1*Vs_nom
Is_lim0 = 106.348
Vs_lim = 139.719
λd_r_nom_aprox := sqrt(2)*Vs_nom/(2*π*fe_nom)
# Valor aproximado del enlace de flujo (λ) en el rotor en el eje d en el punto de OP nominal.
# Marco de referencia síncrono con we.
λd_r_nom_aprox = 0.476481
# Valor exacto del enlace de flujo (λ) en el rotor en el eje d en el punto de OP nominal. Marco de referencia síncrono con we.
λd_r_nom := ((sqrt(2)*Vs_nom) - sqrt((Rs*sqrt(2)*Is(fe_nom, Nr_nom, Vs_nom, Rs, Lls, Lm, Rr, Llr))^2 + (2*π*fe_nom*σ*Ls*sqrt(2)*Is(fe_nom, Nr_nom, Vs_nom, Rs, Lls, Lm, Rr, Llr))^2))/(2*π*fe_nom*Lm/Lr)
λd_r_nom = 0.388859
ωb := sqrt((sqrt(2)*Vs_lim)^2/(λd_r_nom^2*((Ls^2 - (σ*Ls)^2)/Lm^2) + (σ*Ls*sqrt(2)*Is_lim0)^2))
fb := ωb/(2*π)  # Frecuencia eléctrica del estátor en Hz (fb=fe_b) que delimita las zonas 1 y 2 (si fe>fb comienza el flux weakening de la zona 2)
fb = 72.8704
ω1 := (sqrt(2)*Vs_lim)/(sqrt(2)*Is_lim0)*sqrt((1 + σ^2)/(2*Ls^2*σ^2))
f1 := ω1/(2*π)  # Frecuencia eléctrica del estátor en Hz (f1=fe1b) que delimita las zonas 2 y 3 (si fe>f1 comienza el flux weakening de la zona 3)
f1 = 147.751
Tem(fe_nom, Nr_nom, Vs_nom, Rs, Lls, Lm, Rr, Llr) = 119.626
# Par nominal de la máquina. Con este par la corriente estátor es Is_nom.
# Se produce con fe_nom, Vs_nom y a Nr_nom
Vs_nom = 127.017
Is_nom = 70.8985
Ne(fe) := 60/PP*fe  # Velocidad síncrona del motor (r.p.m.)
Ne(fe_nom) = 1800
Tem(fe_nom, Nr_nom, Vs_lim, Rs, Lls, Lm, Rr, Llr) = 144.748
Vs_nom = 127.017
S(fe, Nr) := (Ne(fe) - Nr)/Ne(fe)  # Deslizamiento para el punto de operación deseado
Is_nom = 70.8985
S(fe_nom, Nr_nom) = 0.0138889
Is_nom = 70.8985
Is_lim0 = 106.348
Vs_nom = 127.017
Vs_lim = 139.719
Vs_lim = 139.719
fe_nom = 60
fb = 72.8704
f1 = 147.751
# Curvas Tem frente a Nr aplicando el flux weakening en zona 1 (Vs/fe=Vs_lim/fb=cte) y en zona 2 con Vs=Vs_lim y aumentando fe
# EN EL LIBRO SUL PÁGINAS 265-267 SE DAN VALORES DE LA FUNCIÓN λdr(we), EN LAS 3 ZONAS DE FUNCIONAMIENTO, DE MANERA QUE SE PUEDE DEDUCIR
# λdr_b Y λdr_1 A PARTIR DE LAS EXPRESIONES DE wrb y wr1. POR TANTO NO SERÍA NECESARIO CALCULAR λdr_b Y λdr_1 RESOLVIENDO ECUACIONES TRASCENDENTES. EL CÁLCULO SERÁ ACEPTABLE SI S<<1 EN LAS ZONAS DE FUNCIONAMIENTO
λd_r_nom = 0.388859
Vs_lim = 139.719
Is_lim0 = 106.348
fb = 72.8704
f1 = 147.751
λdr_fe_ZONA1(fe) := λd_r_nom
λdr_fe_ZONA3(fe) := Lm*(sqrt(2)*Vs_lim)/(sqrt(2)*(2*π*fe)*Ls)
λdr_fe_ZONA2(fe) := Lm*sqrt(((sqrt(2)*Vs_lim/(2*π*fe))^2 - (σ*Ls*sqrt(2)*Is_lim0)^2)/(Ls^2*(1 - σ^2)))
λdr_fe_ZONA1(0) = 0.388859
λdr_fe_ZONA2(fb) = 0.388859
λdr_fe_ZONA3(f1) = 0.144349
λdr_fe_ZONA2(f1) = 0.144349
λdr_fe(fe) :=
    λdr_fe_ZONA1(fe) if 0 ≤ fe ≤ fb
    λdr_fe_ZONA2(fe) if fb < fe ≤ f1
    λdr_fe_ZONA3(fe) if f1 < fe
fe := 0, 1 .. 4*fe_nom
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# Definición de la limitación de corriente RMS  de estátor en las 3 zonas en función de fe. Zonas 1 y 2 limitación cte al valor Is_lim0
Is_nom = 70.8985
Is_lim_fe(fe) :=
    Is_lim0 if 0 ≤ fe ≤ fb
    Is_lim0 if fb < fe ≤ f1
    Is_lim0*f1/fe if f1 < fe
fe_nom = 60
Is_lim0 = 106.348
fb = 72.8704
f1 = 147.751
fe := 0, 1 .. 4*fe_nom
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# Definición del par máximo con FOC en función de fe
Tem_FOC_max_fe(fe) := sqrt(2*Is_lim_fe(fe)^2 - λdr_fe(fe)^2/Lm^2)*3/2*PP*Lm/Lr*λdr_fe(fe)
Tem_FOC_max0 := Tem_FOC_max_fe(0)
Tem_FOC_max0 = 165.848
Tem_nom = 118.357
fe := 0, 1 .. 4*fe_nom
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Tem_b := Tem_FOC_max_fe(fb)
Tem_b = 165.848
Tem_1 := Tem_FOC_max_fe(f1)
Tem_1 = 62.6657
# Definición de fslip con FOC para Tem=Tem_FOC_max en función de fe
fslip_TemFOCmax_fe(fe) := Lm/(2*π*(Lr/Rr*λdr_fe(fe)))*sqrt(2*Is_lim_fe(fe)^2 - λdr_fe(fe)^2/Lm^2)
fslip_TemFOCmax0 := fslip_TemFOCmax_fe(0)
fslip_TemFOCmax0 = 1.46631
fe := 0, 1 .. 4*fe_nom
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fslip_TemFOCmax_fe(fb) = 1.46631
fb = 72.8704
fslip_TemFOCmax_fe(f1) = 4.02072
f1 = 147.751
fslip_b := fslip_TemFOCmax_fe(fb)
fslip_b = 1.46631
fslip_1 := fslip_TemFOCmax_fe(f1)
fslip_1 = 4.02072
# Definición de Nslip=Ne-Nr con FOC para Tem=Tem_FOC_max en función de fe
Nslip_TemFOCmax_fe(fe) := (2*π*fslip_TemFOCmax_fe(fe))/PP*60/(2*π)
(2*π*fe_nom)/PP*60/(2*π) = 1800
Tem_nom = 118.357
Snom = 0.0138889
Nslip_TemFOCmax_fe(fb) = 43.9894
fb = 72.8704
(2*π*fb)/PP*60/(2*π) = 2186.11
Nslip_TemFOCmax_fe(f1) = 120.622
f1 = 147.751
(2*π*f1)/PP*60/(2*π) = 4432.52
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# Definición de S con FOC para Tem=Tem_FOC_max en función de fe
S_TemFOCmax_fe(fe) := fslip_TemFOCmax_fe(fe)/fe
S_TemFOCmax0 := S_TemFOCmax_fe(fb)
fe := 10, 11 .. 4*fe_nom
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S_TemFOCmax0 = 0.0201222
S_TemFOCmax_fe(fb) = 0.0201222
fb = 72.8704
S_TemFOCmax_fe(f1) = 0.0272129
f1 = 147.751
Sb := S_TemFOCmax_fe(fb)
Sb = 0.0201222
S1 := S_TemFOCmax_fe(f1)
S1 = 0.0272129
# Cálculo de Nr_b y Nr_1 conociendo fb-Sb y f1-S1
Nr_TemFOCmax_fe(fe) := 2*π*fe/PP*60/(2*π)*(1 - S_TemFOCmax_fe(fe))  # Nr con FOC para Tem=Tem_FOC_max en función de fe
fe := 10, 11 .. 4*fe_nom
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Nr_b := Nr_TemFOCmax_fe(fb)
Nr_b = 2142.12
Nr_1 := Nr_TemFOCmax_fe(f1)
Nr_1 = 4311.9
# ¿Cómo representar λdr en función de Nr en vez de en función de fe? APROXIMO EL VALOR DE S COMO SI FUERA CONSTANTE EN UNA ZONA DADA
fe_nom = 60
Snom = 0.0138889
Nr_nom = 1775
fe == Nr*PP/(60*(1 - S))
Nr_aprox == fe*60*(1 - Saprox_zona)/PP
fb = 72.8704
Sb = 0.0201222
Nr_b = 2142.12
f1 = 147.751
S1 = 0.0272129
Nr_1 = 4311.9
λdr_ZONA1(Nr) := λd_r_nom
λdr_aprox_ZONA3(Nr) := Lm*(sqrt(2)*Vs_lim)/(sqrt(2)*(2*π*Nr*PP/(60*(1 - S1)))*Ls)
λdr_aprox_ZONA2(Nr) := Lm*sqrt(((sqrt(2)*Vs_lim/(2*π*Nr*PP/(60*(1 - (Sb + S1)/2))))^2 - (σ*Ls*sqrt(2)*Is_lim0)^2)/(Ls^2*(1 - σ^2)))
λdr_ref_aprox(Nr) :=
    λdr_ZONA1(Nr) if 0 ≤ Nr ≤ fb*60*(1 - Sb)/PP
    λdr_aprox_ZONA2(Nr) if fb*60*(1 - Sb)/PP < Nr ≤ f1*60*(1 - S1)/PP
    λdr_aprox_ZONA3(Nr) if f1*60*(1 - S1)/PP < Nr
Nr_prueba := 0, 1 .. 4*Nr_nom
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λdr_fe(fb) = 0.388859  # Se parecen mucho
λdr_ref_aprox(Nr_b) = 0.388859
λdr_fe(f1) = 0.144349  # Se parecen mucho
λdr_ref_aprox(Nr_1) = 0.145405
Sb = 0.0201222
Tem_fe_nom =  # error: Esta variable no está definida.
S_fe_nom =  # error
# CONCLUSIÓN: Si los valores de S son bajos en todas las zonas, se puede usar la fórmula de generación de referencia de flujo aproximada a partir de las ecuaciones de SUL. Estas ecuaciones permiten conocer: fb-Sb-fslip_b y f1-S1-fslip_1, así como la variación en las tres zonas de todas las variables que determinan las curvas de operación con FOC.
# COMPROBACIÓN DE QUE EN LAS FRECUENCIAS QUE DELIMITAN LAS ZONAS DE FUNCIONAMIENTO (fb Y f1) SE CUMPLEN LAS CONDICIONES DE CONTORNO
# CON LOS VALORES ESCOGIDOS DE Is_lim0 y Vs_lim
fb = 72.8704
Nr_b = 2142.12
Is_lim0 = 106.348
Vs_lim = 139.719
Nr_1 = 4311.9
f1 = 147.751
Is(fb, Nr_b, Vs_lim, Rs, Lls, Lm, Rr, Llr) = 103.383  # Este valor debe estar muy cercano a Is_lim0
Tem_b = 165.848
Tem(fb, Nr_b, Vs_lim, Rs, Lls, Lm, Rr, Llr) = 156.731
# Este valor debe estar muy cercano a Tem_b. Par en el punto de OP fb-Nr_b-Vs_lim (final de la zona 1=inicio de la zona 2)
Is(f1, Nr_1, Vs_lim, Rs, Lls, Lm, Rr, Llr) = 104.041  # Este valor debe estar muy cercano a Is_lim0
Tem_1 = 62.6657
Tem(f1, Nr_1, Vs_lim, Rs, Lls, Lm, Rr, Llr) = 59.977
# Este valor debe estar muy cercano a Tem_1. Par en el punto de OP f1-Nr_1-Vs_lim (final de la zona 2= inicio de la zona 3)
# Según Mohan (trabajando con Vs_lim para fe=fb)
Vs_boost(fb, Nr_b, Vs_lim, Rs, Lls, Lm, Rr, Llr) := Rs*Is(fb, Nr_b, Vs_lim, Rs, Lls, Lm, Rr, Llr)
# Tensión de compensación (voltage boost) de la caíra de tensión en la resistencia de estátor a frecuencias fe bajas
Vs_boost(fb, Nr_b, Vs_lim, Rs, Lls, Lm, Rr, Llr) = 4.54886
# Copiar valor
Vs_boost := 4.54886
Vs_lim = 139.719
Vs_fe(fe) :=
    (Vs_lim - Vs_boost)/fb*fe + Vs_boost if 0 ≤ fe ≤ fb
    Vs_lim if fb < fe
# Tensión RMS de estátor (fase-neutro) obtenida mediante el FOC. Se tiene en cuenta el voltage Boost ( IR compensation).
# Definición a trozos (zona 1, 2=3 para Vs del Flux weakening) de Vs(fe) impuesto por el FOC.
# fb y f1 dependen de los valores de limitación de corriente de estátor y de limitación de la y tensión de estátor escogidos.
fe_prueba := 0, 0.1 .. 2*f1
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Tem(1.8*fb, Nr_prueba, Vs_lim, Rs, Lls, Lm, Rr, Llr)
(Vs_lim - Vs_boost)/fb*0.7*fb + Vs_boost
Nr_prueba := 500, 501 .. 5000
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# Definición de la limitación de corriente RMS  de estátor en las 3 zonas en función de Nr. Zonas 1 y 2 limitación cte al valor Is_lim0
Is_nom = 70.8985
Is_lim(Nr) :=
    Is_lim0 if 0 ≤ Nr ≤ Nr_b
    Is_lim0 if Nr_b < Nr ≤ Nr_1
    Is_lim0*f1/((Nr*PP)/(60*(1 - S1))) if Nr_1 < Nr
fe_nom = 60
Nr_aprox == fe*60*(1 - Saprox_zona)/PP
Is_lim0 = 106.348
fb = 72.8704
f1 = 147.751
Nr_b = 2142.12
Nr_1 = 4311.9
Nr_prueba := 0, 1 .. 4*Nr_nom
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# Definición del par máximo con FOC en función de Nr
Tem_FOC_max(Nr) := sqrt(2*Is_lim(Nr)^2 - λdr_ref_aprox(Nr)^2/Lm^2)*3/2*PP*Lm/Lr*λdr_ref_aprox(Nr)
λdr_ref_aprox(Nr_b) = 0.388859
Nr_prueba := 0, 1 .. 4*Nr_nom
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Tem_FOC_max(Nr_b) = 165.848
Tem_b = 165.848
Tem_FOC_max(Nr_1) = 63.1216
Tem_1 = 62.6657
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# EXPRESIÓN DE LA CORRIENTE EN EL ROTOR, LA TENSIÓN MAGNETIZANTE Em Y DEL FLUJO MAGNETIZANTE λm EN LA MÁQUINA
Ir(fe, Nr, Vs, Rs, Lls, Lm, Rr, Llr) := Vth(fe, Vs, Rs, Lls, Lm)/sqrt((Rth(fe, Rs, Lls, Lm) + Rr/S(fe, Nr))^2 + (Xth(fe, Rs, Lls, Lm) + Xlr(fe, Llr))^2)
# Corriente eficaz de rotor
Is(fe_nom, Nr_nom, Vs_nom, Rs, Lls, Lm, Rr, Llr) = 70.8985
Ir(fe_nom, Nr_nom, Vs_nom, Rs, Lls, Lm, Rr, Llr) = 64.363  # Ir es algo menor que Is
Em(fe, Nr, Vs, Rs, Lls, Lm, Rr, Llr) := Ir(fe, Nr, Vs, Rs, Lls, Lm, Rr, Llr)*sqrt((Rr/S(fe, Nr))^2 + Xlr(fe, Llr)^2)  # Tensión magnetizante (valor eficaz)
Vs_nom = 127.017
Em(fe_nom, Nr_nom, Vs_nom, Rs, Lls, Lm, Rr, Llr) = 117.336  # Em es algo menor que Vs
λm(fe, Nr, Vs, Rs, Lls, Lm, Rr, Llr) := Em(fe, Nr, Vs, Rs, Lls, Lm, Rr, Llr)/(2*π*fe)  # Enlace de flujo magnetizante (valor eficaz)
λd_r_nom/sqrt(2) = 0.274964
λm(fe_nom, Nr_nom, Vs_nom, Rs, Lls, Lm, Rr, Llr) = 0.311243
# Parece que λm está en el mismo orden de magnitud que el valor de λdr dividido raíz de 2, aunque la relación entre ambas no se puede extraer rápidamente del simple análisis de fasores.
# Notar que λdr es un valor de pico según las transformadas del SUL, por lo que hay que dividirlo entre raíz de 2 para compara con λm, que es un valor eficaz
Em_nom := Em(fe_nom, Nr_nom, Vs_nom, Rs, Lls, Lm, Rr, Llr)
Em_nom = 117.336
Im(fe, Nr, Vs, Rs, Lls, Lm, Rr, Llr) := λm(fe, Nr, Vs, Rs, Lls, Lm, Rr, Llr)/Lm  # Corriente magnetizante (valor eficaz)
λm_nom := Em_nom/(2*π*fe_nom)
λm_nom = 0.311243
# Par EM y corrientes de rotor y estátor
Nr_prueba := 1, 2 .. 1800
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# Par EM y Em
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# Par EM y λm
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λd_r_nom = 0.388859  # Em y λm
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Vs_nom/(2*π*fe_nom) = 0.336923
Nr_prueba := 1, 2 .. 1800
# Par EM y Im (corriente magnetizante RMS)
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Is_nom = 70.8985
# EVOLUCIÓN DE λm CON LA ESTRATEGIA DE FLUX WEAKENING CON FOC
Im(fe_nom, 0, Vs_nom, Rs, Lls, Lm, Rr, Llr) = 11.7329
λm_nom/Lm = 24.1274
Nr_prueba := 500, 501 .. 5000
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Pmec_nom = 22000
Pmec(f1, Nr_1, Vs_lim, Rs, Lls, Lm, Rr, Llr) = 27082.1
Pmec(fb, Nr_b, Vs_lim, Rs, Lls, Lm, Rr, Llr) = 35158.3
Pmec_1 := Pmec(f1, Nr_1, Vs_lim, Rs, Lls, Lm, Rr, Llr)
Pmec_b := Pmec(fb, Nr_b, Vs_lim, Rs, Lls, Lm, Rr, Llr)
Nr_1 = 4311.9
Pmec_1 = 27082.1
Pmec_b = 35158.3
Nr_b = 2142.12
Nr_prueba := 500, 501 .. 5000
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